Simulations: Version=216
  DataStore
    ParallelPostSimulationTool
      SerialPostSimulationTool PredictedObserved
        ParallelPostSimulationTool ReadInputs
          ExcelInput: FileNames=[obs\Observed.xlsx]; SheetNames=[Observed]
        ParallelPostSimulationTool MergeWithPredictions
          PredictedObserved DaysToMaturityPredictedObserved: PredictedTableName=HarvestReport; ObservedTableName=Observed; FieldNameUsedForMatch=SimulationName; AllColumns=false
          PredictedObserved YieldPredictedObserved: PredictedTableName=SeasonEndReport; ObservedTableName=Observed; FieldNameUsedForMatch=SimulationName; AllColumns=false
  Folder Replacements
    Plant Strawberry: PlantType=Strawberry
      Phenology
        MultiplyFunction BaseThermalTime
          SubDailyInterpolation SubDailyTT: agregationMethod=0
            IndexedExpressionFunction Response: IndexVariable=InterpT
              Expression=(min(max(((2 * (max(InterpT - Alpha.TMin, 0) ^ Alpha) * ((Alpha.TOpt - Alpha.TMin) ^ Alpha) - max(InterpT - Alpha.TMin, 0) ^ (2 * Alpha)) / ((Alpha.TOpt - Alpha.TMin) ^ (2 * Alpha))), 0), 1) ^ Beta) * (Alpha.TOpt - Alpha.TMin)
              ExpressionFunction Alpha: Expression=divide(ln(2), ln(divide(TMax - TMin, TOpt - TMin)))
                Constant TMin: FixedValue=5
                Constant TOpt: FixedValue=20
                Constant TMax: FixedValue=30
              Constant Beta: FixedValue=1
            ThreeHourAirTemperature InterpolationMethod
        PhaseLookup ThermalTime
          PhaseLookupValue AllPhases: Start=Sowing; End=Harvest
            VariableReference Base: VariableName=[Phenology].BaseThermalTime
        GenericPhase Transplanting to Established: Start=Sowing; End=Established; IsEmerged=true
          Constant Target: FixedValue=60
          VariableReference Progression: VariableName=[Phenology].ThermalTime
        GenericPhase Established to VegetativeGrowth: Start=Established; End=VegetativeGrowth; IsEmerged=true
          Constant Target: FixedValue=500
          VariableReference Progression: VariableName=[Phenology].ThermalTime
        GenericPhase VegetativeGrowth to FlowerInduction: Start=VegetativeGrowth; End=FlowerInduction; IsEmerged=true
          Constant Target: FixedValue=1
          MultiplyFunction Progression
            VariableReference ThermalTime: VariableName=[Phenology].ThermalTime
            VariableReference PhotoperiodGate: VariableName=[Phenology].PhotoperiodGateValue
        GenericPhase FlowerInduction to Anthesis: Start=FlowerInduction; End=Anthesis; IsEmerged=true
          Constant Target: FixedValue=195
          VariableReference Progression: VariableName=[Phenology].ThermalTime
        GenericPhase Anthesis to FruitSet: Start=Anthesis; End=FruitSet; IsEmerged=true
          Constant Target: FixedValue=45
          VariableReference Progression: VariableName=[Phenology].ThermalTime
        GenericPhase FruitSet to GreenFruit: Start=FruitSet; End=GreenFruit; IsEmerged=true
          Constant Target: FixedValue=80
          VariableReference Progression: VariableName=[Phenology].ThermalTime
        GenericPhase GreenFruit to Maturity: Start=GreenFruit; End=Maturity; IsEmerged=true
          Constant Target: FixedValue=120
          VariableReference Progression: VariableName=[Phenology].ThermalTime
        GenericPhase Maturity to Harvest: Start=Maturity; End=Harvest; IsEmerged=true
          Constant Target: FixedValue=30
          VariableReference Progression: VariableName=[Phenology].ThermalTime
        GotoPhase RepeatFlowering: Start=Harvest; IsEmerged=true; PhaseNameToGoto=VegetativeGrowth to FlowerInduction; RemovalType=5
        Constant PhotoperiodGateValue: FixedValue=1
      Manager StrawberryPhotoperiod
        CultivarType = 1
        CriticalDayLength = 14
        MinInductiveTemp = 8
        MaxInductiveTemp = 25
        MinInductiveDays = 10
        HeatSuppressionThreshold = 26
        PhotoperiodGate = 0
        InductiveDaysAccumulated = 0
        Daylength = 12
```csharp
// ============================================================
// StrawberryPhotoperiod.cs
// APSIM NextGen Script Node — Photoperiod Flower Induction Gate
//
// Place this Script node as a child of [Plant].
// Name the node: StrawberryPhotoperiod
//
// Exposes:
//   [StrawberryPhotoperiod].PhotoperiodGate
//     = 1 when flowering can proceed, 0 when blocked
//
//   [StrawberryPhotoperiod].InductiveDaysAccumulated
//     = count of consecutive inductive days
//
// Logic:
//   SD cultivars (CultivarType = 0):
//     Gate = 1 ONLY when:
//       - Daylength < CriticalDayLength (typically 14 h)
//       - Mean temperature within inductive range
//         (MinInductiveTemp < Tmean < MaxInductiveTemp)
//       - InductiveDaysAccumulated >= MinInductiveDays
//     Otherwise Gate = 0 (blocks Progression in phenology phase)
//
//   DN cultivars (CultivarType = 1):
//     Gate is always 1 (photoperiod-insensitive).
//     High-temperature suppression is applied instead:
//       Gate = 1 when Tmean < HeatSuppressionThreshold (26 °C)
//       Gate = 0 when Tmean >= HeatSuppressionThreshold
//     This reflects the well-documented heat-induced flowering
//     suppression in DN cultivars above ~26 °C.
//
// Daylength is computed from latitude (read from Weather node)
// using the standard astronomical formula.
//
// Reference:
//   Resh (1998); Durner et al. (1984) flower induction thresholds
//   Hancock (1999) strawberry physiology review
// ============================================================

using System;
using Models;
using Models.Core;
using Models.Climate;
using Models.PMF;

/// <summary>Photoperiod flower induction gate for strawberry.</summary>
[Serializable]
public class Script : Model
{
    // -------------------------------------------------------
    // Links
    // -------------------------------------------------------
    [Link] private Plant Plant = null;
    [Link] private Clock Clock = null;
    [Link] private Weather Weather = null;
    // Phenology's Progression reads the gate from this Constant rather than
    // from [StrawberryPhotoperiod].PhotoperiodGate directly - cross-referencing
    // a Manager script's own properties by bracket-path is not reliably
    // resolvable at runtime in this APSIM build (confirmed empirically: it
    // fails identically whether read from a Report or a VariableReference).
    // Written via Node.Set() with an explicit path rather than [Link]: a
    // plain [Link] by type+name silently bound to the wrong Constant
    // (Phenology.BaseThermalTime's "TMin") when many Constant-typed nodes
    // exist in the same subtree, and [Link(Path=...)] did not fix this
    // either - confirmed empirically both times by seeing TMin's value
    // overwritten from 5.0 to the gate's 0/1 value, which was quietly
    // inflating thermal-time accumulation for every phase.

    // -------------------------------------------------------
    // Parameters
    // -------------------------------------------------------

    /// <summary>
    /// Cultivar type: 0 = Short-day (SD), 1 = Day-neutral (DN).
    /// Override in Cultivar node.
    /// </summary>
    [Description("Cultivar type: 0 = Short-day, 1 = Day-neutral")]
    public int CultivarType { get; set; } = 0;

    // -- SD parameters --

    /// <summary>
    /// Critical photoperiod for flower induction in SD cultivars (hours).
    /// Flowering occurs when daylength FALLS BELOW this threshold.
    /// Typical range: 12–14 h; default 14 h.
    /// </summary>
    [Description("Critical daylength for SD flower induction (h)")]
    public double CriticalDayLength { get; set; } = 14.0;

    /// <summary>Minimum mean temperature for flower induction (°C).</summary>
    [Description("Minimum mean temperature for SD flower induction (°C)")]
    public double MinInductiveTemp { get; set; } = 8.0;

    /// <summary>Maximum mean temperature for flower induction (°C).</summary>
    [Description("Maximum mean temperature for SD flower induction (°C)")]
    public double MaxInductiveTemp { get; set; } = 25.0;

    /// <summary>
    /// Minimum number of consecutive short days required
    /// before the induction gate opens.
    /// Typical: 7–14 days.
    /// </summary>
    [Description("Minimum consecutive inductive days required")]
    public int MinInductiveDays { get; set; } = 10;

    // -- DN parameters --

    /// <summary>
    /// Mean temperature above which flowering is suppressed in
    /// DN cultivars (°C). Typical: 26–28 °C.
    /// </summary>
    [Description("Heat suppression threshold for DN cultivars (°C)")]
    public double HeatSuppressionThreshold { get; set; } = 26.0;

    // -------------------------------------------------------
    // Outputs
    // -------------------------------------------------------

    /// <summary>
    /// 1 = flowering can proceed; 0 = blocked.
    /// Used as a multiplier on Phenology Progression.
    /// </summary>
    [Description("Photoperiod/temperature gate for flower induction (0 or 1)")]
    public double PhotoperiodGate { get; private set; } = 0.0;

    /// <summary>Count of consecutive inductive short days (SD only).</summary>
    [Description("Consecutive inductive days accumulated (SD only)")]
    public int InductiveDaysAccumulated { get; private set; } = 0;

    /// <summary>Today's calculated daylength (hours).</summary>
    [Description("Calculated daylength (h)")]
    public double Daylength { get; private set; } = 12.0;

    // -------------------------------------------------------
    // Event handlers
    // -------------------------------------------------------

    // Replacements enforces one shared copy of this script (and its
    // CultivarType default) across every simulation that reuses this Plant
    // definition, so a per-simulation override of the CultivarType parameter
    // doesn't stick. Cultivar-specific switching is done here instead, via
    // the name the crop was actually sown with (Plant.CultivarName), which
    // *is* simulation-specific at runtime.
    private int GetEffectiveCultivarType()
    {
        if (Plant.SowingData != null && Plant.SowingData.Cultivar == "GenericSD")
            return 0; // short-day (e.g. Australian production cultivars)
        return CultivarType; // Albion/SanAndreas/unspecified -> configured default (DN)
    }

    [EventSubscribe("StartOfDay")]
    private void OnStartOfDay(object sender, EventArgs e)
    {
        Daylength = CalcDaylength(Weather.Latitude, Clock.Today.DayOfYear);
        double tmean = (Weather.MaxT + Weather.MinT) / 2.0;

        if (GetEffectiveCultivarType() == 1)
        {
            // DN cultivar: gate = 1 unless heat suppression
            PhotoperiodGate = (tmean < HeatSuppressionThreshold) ? 1.0 : 0.0;
            InductiveDaysAccumulated = 0; // not applicable
        }
        else
        {
            // SD cultivar
            bool inductivePhotoperiod = Daylength < CriticalDayLength;
            bool inductiveTemperature = tmean >= MinInductiveTemp
                                     && tmean <= MaxInductiveTemp;

            if (inductivePhotoperiod && inductiveTemperature)
                InductiveDaysAccumulated++;
            else
                InductiveDaysAccumulated = 0; // reset on non-inductive day

            bool gateOpen = InductiveDaysAccumulated >= MinInductiveDays;
            PhotoperiodGate = gateOpen ? 1.0 : 0.0;
        }

        Node.Set("[Phenology].PhotoperiodGateValue.FixedValue", PhotoperiodGate, this);
    }

    // -------------------------------------------------------
    // Astronomical daylength calculation
    // Spencer (1971) / Forsythe et al. (1995) approximation
    // latitude: degrees (positive = N, negative = S)
    // doy: day of year (1–365)
    // Returns: daylength in decimal hours
    // -------------------------------------------------------
    private static double CalcDaylength(double latitude, int doy)
    {
        double latRad = latitude * Math.PI / 180.0;
        double declination = 0.006918
            - 0.399912 * Math.Cos(2 * Math.PI * doy / 365.0)
            + 0.070257 * Math.Sin(2 * Math.PI * doy / 365.0)
            - 0.006758 * Math.Cos(4 * Math.PI * doy / 365.0)
            + 0.000907 * Math.Sin(4 * Math.PI * doy / 365.0);

        double cosHourAngle = -Math.Tan(latRad) * Math.Tan(declination);

        // Clamp to [-1, 1] for polar day/night edge cases
        cosHourAngle = Math.Max(-1.0, Math.Min(1.0, cosHourAngle));

        double hourAngle = Math.Acos(cosHourAngle);
        return 2.0 * hourAngle * 180.0 / Math.PI / 15.0; // convert to hours
    }
}
```
      Manager MaturityEventPublisher
```csharp
using System;
using Models.Core;
using Models.PMF;
using Models.PMF.Phen;

[Serializable]
public class Script : Model
{
    [Link] private Plant Strawberry = null;
    [Link] private Phenology Phenology = null;
    private string previousPhase = "";
    private bool hasFired = false;

    [EventSubscribe("StartOfDay")]
    private void OnStartOfDay(object sender, EventArgs e)
    {
        string currentPhase = Phenology.CurrentPhaseName;
        if (!hasFired && currentPhase == "Maturity to Harvest" && previousPhase != "Maturity to Harvest")
        {
            hasFired = true;
            Strawberry.Harvest(removeBiomassFromOrgans: false);
        }
        previousPhase = currentPhase;
    }
}
```
      Folder Cultivars
        Cultivar Albion
        Cultivar SanAndreas
        Cultivar GenericSD
      Constant MortalityRate: FixedValue=0
      Constant SeedMortalityRate: FixedValue=0
      OrganArbitrator Arbitrator
        BiomassTypeArbitrator DMArbitration
          Folder PotentialPartitioningMethods
            ReallocationMethod
            AllocateFixationMethod
            RetranslocationMethod
            SendPotentialDMAllocationsMethod
          Folder AllocationMethods
            NutrientConstrainedAllocationMethod
            DryMatterAllocationsMethod
          RelativeAllocation ArbitrationMethod
        BiomassTypeArbitrator NArbitration
          Folder PotentialPartitioningMethods
            ReallocationMethod
          Folder ActualPartitioningMethods
            AllocateFixationMethod
            RetranslocationMethod
          Folder AllocationMethods
            NitrogenAllocationsMethod
          RelativeAllocation ArbitrationMethod
          AllocateUptakesMethod
        WaterUptakeMethod
        NitrogenUptakeMethod
      SimpleLeaf Leaf: Albedo=0.23; Gsmax350=0.011; R50=200; LeafInitialisationStage=Established; Height=0; BaseHeight=0; Width=0; FRGR=0; PotentialEP=0; WaterDemand=0; KDead=0.2; LAIDead=0
        RUEModel Photosynthesis
          Constant RUE: FixedValue=1.2
          Constant FT: FixedValue=1
          Constant FVPD: FixedValue=1
          Constant FN: FixedValue=1
          Constant FW: FixedValue=1
          RUECO2Function FCO2: PhotosyntheticPathway=C3
          VariableReference RadnInt: VariableName=[Leaf].RadiationIntercepted
        MultiplyFunction FRGR
          VariableReference RUE_FT: VariableName=[Leaf].Photosynthesis.FT
          VariableReference RUE_FN: VariableName=[Leaf].Photosynthesis.FN
          VariableReference RUE_FVPD: VariableName=[Leaf].Photosynthesis.FVPD
        StomatalConductanceCO2Modifier
          VariableReference PhotosynthesisCO2Modifier: VariableName=[Leaf].Photosynthesis.FCO2
        MultiplyFunction Area
          VariableReference SLA: VariableName=[Leaf].SpecificArea
          VariableReference LeafLiveWt: VariableName=[Leaf].Live.Wt
        Constant SpecificArea: FixedValue=0.022; Units=m^2/kg
        Constant ExtinctionCoefficient: FixedValue=0.58
        Constant HeightFunction: FixedValue=150; Units=mm
        MultiplyFunction LAIDead
          VariableReference SLA: VariableName=[Leaf].SpecificArea
          VariableReference LeafDeadWt: VariableName=[Leaf].Dead.Wt
        Constant NReallocationFactor: FixedValue=1
        Constant NRetranslocationFactor: FixedValue=0
        Constant DMRetranslocationFactor: FixedValue=0
        Constant DMReallocationFactor: FixedValue=0
        Constant RemobilisationCost: FixedValue=0
        Constant MaintenanceRespiration: FixedValue=0
        Constant DMConversionEfficiency: FixedValue=1; Units=0-1
        Constant CarbonConcentration: FixedValue=0.4
        Constant SenescenceRate: FixedValue=0.03; Units=/d
        Constant DetachmentRate: FixedValue=0; Units=/d
        BiomassRemoval BiomassRemovalDefaults: HarvestFractionLiveToRemove=0; HarvestFractionDeadToRemove=0; HarvestFractionLiveToResidue=1; HarvestFractionDeadToResidue=1
        NutrientDemandFunctions DMDemands
          MultiplyFunction Structural
            PartitionFractionDemandFunction DMDemandFunction
              PhaseLookup PartitionFraction
                PhaseLookupValue Vegetative: Start=Sowing; End=FruitSet
                  Constant Fraction: FixedValue=0.45
                PhaseLookupValue Fruiting: Start=FruitSet; End=Harvest
                  Constant Fraction: FixedValue=0.2
            Constant StructuralFraction: FixedValue=1
          Constant Metabolic: FixedValue=0
          Constant Storage: FixedValue=0
          Constant QStructuralPriority: FixedValue=1
          Constant QMetabolicPriority: FixedValue=1
          Constant QStoragePriority: FixedValue=1
        NutrientDemandFunctions NDemands
          Constant Structural: FixedValue=0
          Constant Metabolic: FixedValue=0
          Constant Storage: FixedValue=0
          Constant QStructuralPriority: FixedValue=1
          Constant QMetabolicPriority: FixedValue=1
          Constant QStoragePriority: FixedValue=1
        Constant InitialWt: FixedValue=0.05; Units=g/plant
        Constant MaximumNConc: FixedValue=0.04
        Constant MinimumNConc: FixedValue=0.02
        VariableReference CriticalNConc: VariableName=[Leaf].MinimumNConc
      GenericOrgan Crown: IsAboveGround=true
        Constant Photosynthesis: FixedValue=0
        Constant NReallocationFactor: FixedValue=1
        Constant NRetranslocationFactor: FixedValue=0
        Constant DMRetranslocationFactor: FixedValue=0.15
        Constant DMReallocationFactor: FixedValue=0
        Constant SenescenceRate: FixedValue=0; Units=/d
        Constant DetachmentRateFunction: FixedValue=0; Units=/d
        Constant MaintenanceRespirationFunction: FixedValue=0
        Constant DMConversionEfficiency: FixedValue=1; Units=0-1
        Constant RemobilisationCost: FixedValue=0
        Constant CarbonConcentration: FixedValue=0.4
        BiomassRemoval BiomassRemovalDefaults: HarvestFractionLiveToRemove=0; HarvestFractionDeadToRemove=0; HarvestFractionLiveToResidue=1; HarvestFractionDeadToResidue=1
        NutrientDemandFunctions DMDemands
          MultiplyFunction Structural
            PartitionFractionDemandFunction DMDemandFunction
              PhaseLookup PartitionFraction
                PhaseLookupValue Vegetative: Start=Sowing; End=FruitSet
                  Constant Fraction: FixedValue=0.25
                PhaseLookupValue Fruiting: Start=FruitSet; End=Harvest
                  Constant Fraction: FixedValue=0.15
            Constant StructuralFraction: FixedValue=1
          Constant Metabolic: FixedValue=0
          PhaseLookup Storage
            PhaseLookupValue GrowingSeason: Start=Sowing; End=Harvest
              MultiplyFunction Storage
                MaximumFunction StorageDeficit
                  SubtractFunction Deficit
                    MultiplyFunction MaxStorage
                      VariableReference StructuralWt: VariableName=[Crown].Live.StructuralWt
                      Constant MaxConcentration: FixedValue=0.3; Units=gStorage/gStructural
                    VariableReference StorageWt: VariableName=[Crown].Live.StorageWt
                  Constant Zero: FixedValue=0
                Constant DailySynthesisRate: FixedValue=0.02; Units=/d
          Constant QStructuralPriority: FixedValue=1
          Constant QMetabolicPriority: FixedValue=1
          Constant QStoragePriority: FixedValue=1
        NutrientDemandFunctions NDemands: same as Replacements.Strawberry.Leaf.NDemands
        NutrientPoolFunctions InitialWt
          Constant Structural: FixedValue=0.05; Units=g/plant
          Constant Metabolic: FixedValue=0
          Constant Storage: FixedValue=0
        Constant MaximumNConc: FixedValue=0.02
        Constant MinimumNConc: FixedValue=0.01
        VariableReference CriticalNConc: VariableName=[Crown].MinimumNConc
        VariableReference initialNConcFunction: VariableName=[Crown].MinimumNConc
        RetranslocateNonStructural RetranslocateNitrogen
      Root: GrowthRespiration=0; MaintenanceRespiration=0
        Constant RootFrontVelocity: FixedValue=10; Units=mm/d
        Constant MaximumRootDepth: FixedValue=400; Units=mm
        RootShapeCylinder RootShape
        Constant KLModifier: FixedValue=1; Units=0-1
        Constant MaxDailyNUptake: FixedValue=10; Units=kg/ha
        Constant SenescenceRate: FixedValue=0.005; Units=/d
        Constant MaximumNConc: FixedValue=0.02
        Constant MinimumNConc: FixedValue=0.01
        Constant KNO3: FixedValue=0.02
        Constant KNH4: FixedValue=0
        BiomassRemoval BiomassRemovalDefaults: HarvestFractionLiveToRemove=0; HarvestFractionDeadToRemove=0; HarvestFractionLiveToResidue=1; HarvestFractionDeadToResidue=1
        Constant NUptakeSWFactor: FixedValue=1
        Constant SpecificRootLength: FixedValue=40; Units=m/g
        Constant DMConversionEfficiency: FixedValue=1; Units=0-1
        Constant MaintenanceRespirationFunction: FixedValue=0
        Constant RemobilisationCost: FixedValue=0
        Constant CarbonConcentration: FixedValue=0.4
        NutrientDemandFunctions DMDemands
          MultiplyFunction Structural
            PartitionFractionDemandFunction DMDemandFunction
              PhaseLookup PartitionFraction
                PhaseLookupValue Vegetative: Start=Sowing; End=FruitSet
                  Constant Fraction: FixedValue=0.3
                PhaseLookupValue Fruiting: Start=FruitSet; End=Harvest
                  Constant Fraction: FixedValue=0.15
            Constant StructuralFraction: FixedValue=1
          Constant Metabolic: FixedValue=0
          Constant Storage: FixedValue=0
          Constant QStructuralPriority: FixedValue=1
          Constant QMetabolicPriority: FixedValue=1
          Constant QStoragePriority: FixedValue=1
        NutrientDemandFunctions NDemands: same as Replacements.Strawberry.Leaf.NDemands
        Constant NReallocationFactor: FixedValue=1
        Constant DMReallocationFactor: FixedValue=0
        VariableReference CriticalNConc: VariableName=[Root].MinimumNConc
        NutrientPoolFunctions InitialWt: same as Replacements.Strawberry.Crown.InitialWt
      ReproductiveOrgan Fruit: GrowthRespiration=0; MaintenanceRespiration=0
        Biomass Live
        Biomass Dead
        Constant PotentialHarvestIndex: FixedValue=0.0095
        Constant FillingDuration: FixedValue=200; Units=degC-d
        PhaseLookup DMDemandFunction
          PhaseLookupValue Filling: Start=FruitSet; End=Maturity
            MultiplyFunction HIFruitDemand
              VariableReference AboveGroundWt: VariableName=[AboveGround].Wt
              DivideFunction HarvestIndexIncrease
                VariableReference PotentialHarvestIndex: VariableName=[Fruit].PotentialHarvestIndex
                VariableReference FillingDuration: VariableName=[Fruit].FillingDuration
              VariableReference ThermalTime: VariableName=[Phenology].ThermalTime
        Constant MinimumNConc: FixedValue=0.01
        Constant MaximumNConc: FixedValue=0.015
        Constant WaterContent: FixedValue=0.9
        DivideFunction FreshWt
          VariableReference DryWt: VariableName=[Fruit].Wt
          SubtractFunction DryMatterFraction
            Constant One: FixedValue=1
            VariableReference WaterContent: VariableName=[Fruit].WaterContent
        MultiplyFunction NFillingRate
          VariableReference NConc: VariableName=[Fruit].MaximumNConc
          VariableReference DMDemand: VariableName=[Fruit].DMDemandFunction
          VariableReference DMConversionEfficiency: VariableName=[Fruit].DMConversionEfficiency
        BiomassRemoval BiomassRemovalDefaults: HarvestFractionLiveToRemove=1; HarvestFractionDeadToRemove=1; HarvestFractionLiveToResidue=0; HarvestFractionDeadToResidue=0
        Constant DMConversionEfficiency: FixedValue=1; Units=0-1
        Constant RemobilisationCost: FixedValue=0
        Constant CarbonConcentration: FixedValue=0.4
        DivideFunction HarvestIndex
          VariableReference FruitWt: VariableName=[Fruit].Wt
          VariableReference AboveGroundWt: VariableName=[AboveGround].Wt
        Constant MaximumPotentialGrainSize: FixedValue=0
        Constant NumberFunction: FixedValue=0
        NutrientPoolFunctions DMDemandPriorityFactors
          Constant Structural: FixedValue=1
          Constant Metabolic: FixedValue=1
          Constant Storage: FixedValue=1
        NutrientPoolFunctions NDemandPriorityFactors: same as Replacements.Strawberry.Fruit.DMDemandPriorityFactors
      CompositeBiomass AboveGround: OrganNames=[Leaf, Crown, Fruit]; IncludeLive=true; IncludeDead=true
      CompositeBiomass Total: OrganNames=[Leaf, Crown, Fruit, Root]; IncludeLive=true; IncludeDead=true
  Simulation Cycle1_Oct25_Albion
    Clock: Start=2022-10-25; End=2023-01-23
    Summary
    Weather: FileName=Auburn_AL_2022_2023.met
    SoilArbitrator
    Zone Field: Area=1; Slope=0; AspectAngle=0; Altitude=50
      Soil: SoilType=Generic (non-limiting); Site=Strawberry generic; Latitude=0; Longitude=0
        Comments=Generic non-limiting soil - not calibrated. Water/N do not gate growth in this model version (FW=FN=1.0 in Leaf.Photosynthesis); soil exists only to satisfy OrganArbitrator's WaterUptakeMethod/NitrogenUptakeMethod link requirements.
        Physical
          Thickness  BD   AirDry  LL15  DUL   SAT
          150        1.3  0.1     0.15  0.35  0.45
          150        1.3  0.1     0.15  0.35  0.45
          150        1.3  0.1     0.15  0.35  0.45
          150        1.3  0.1     0.15  0.35  0.45
          SoilCrop StrawberrySoil: LL=[0.15, 0.15, 0.15, 0.15]; KL=[0.08, 0.08, 0.08, 0.08]; XF=[1, 1, 1, 1]
        WaterBalance SoilWater: SummerDate=1-Nov; SummerU=1.5; SummerCona=6.5; WinterDate=1-Apr; WinterU=1.5; WinterCona=6.5; DiffusConst=40; DiffusSlope=16; Salb=0.13; CN2Bare=73; CNRed=20; CNCov=0.8; PSIDul=-100; Thickness=[150, 150, 150, 150]; SWCON=[0.3, 0.3, 0.3, 0.3]
        Organic: FOMCNRatio=40; CarbonUnits=Total
          Thickness  Carbon  SoilCNRatio  FBiom  FInert  FOM
          150        1.5     12.5         0.03   0.4     200
          150        0.8     12.5         0.03   0.6     120
          150        0.5     12.5         0.03   0.8     80
          150        0.4     12.5         0.03   0.9     50
        Chemical: Thickness=[150, 150, 150, 150]; PH=[6.5, 6.5, 6.5, 6.5]; PHUnits=Water
        Water: Thickness=[150, 150, 150, 150]; InitialValues=[0.35, 0.35, 0.35, 0.35]; FilledFromTop=true
        CERESSoilTemperature Temperature
        Solute NO3: Thickness=[150, 150, 150, 150]; InitialValues=[10, 10, 10, 10]; InitialValuesUnits=ppm; WaterTableConcentration=0; D0=0; DepthConstant=0; MaxDepthSoluteAccessible=0; RunoffEffectivenessAtMovingSolute=0; MaxEffectiveRunoff=0
        Solute NH4: Thickness=[150, 150, 150, 150]; InitialValues=[1, 1, 1, 1]; InitialValuesUnits=ppm; WaterTableConcentration=0; D0=0; DepthConstant=0; MaxDepthSoluteAccessible=0; RunoffEffectivenessAtMovingSolute=0; MaxEffectiveRunoff=0
        Solute Urea: Thickness=[150, 150, 150, 150]; InitialValues=[0, 0, 0, 0]; InitialValuesUnits=ppm; WaterTableConcentration=0; D0=0; DepthConstant=0; MaxDepthSoluteAccessible=0; RunoffEffectivenessAtMovingSolute=0; MaxEffectiveRunoff=0
        Nutrient
      SurfaceOrganicMatter: InitialResidueName=strawberry_residue; InitialResidueType=wheat; InitialResidueMass=0; InitialStandingFraction=0; InitialCPR=0; InitialCNR=40
      MicroClimate: a_interception=0; b_interception=1; c_interception=0; d_interception=0; SoilHeatFluxFraction=0.4; MinimumHeightDiffForNewLayer=0; NightInterceptionFraction=0.5; ReferenceHeight=2
      AtmosphericPotentialEvaporation
      Plant Strawberry: same as Replacements.Strawberry
      Manager SowStrawberry
        CultivarName = Albion
```csharp
using System;
using Models.Core;
using Models.PMF;
using Models.PMF.Phen;
using Models.PMF.Organs;

[Serializable]
public class Script : Model
{
    [Link] private Plant Strawberry = null;
    [Link] private Phenology Phenology = null;
    [Link] private SimpleLeaf Leaf = null;
    [Link] private GenericOrgan Crown = null;
    [Link] private GenericOrgan Root = null;

    [Description("Cultivar to sow")]
    public string CultivarName { get; set; }

    [EventSubscribe("StartOfSimulation")]
    private void OnStartOfSimulation(object sender, EventArgs e)
    {
        Strawberry.Sow(cultivar: CultivarName, population: 1.0, depth: 10.0, rowSpacing: 300.0);
        Phenology.SetToStage(4.0);
        Leaf.Live.StructuralWt = 115.0;
        Crown.Live.StructuralWt = 65.0;
        Root.Live.StructuralWt = 75.0;
    }
}
```
      Report DailyReport: EventNames=[Clock].EndOfDay
        VariableNames:
          [Clock].Today
          [Strawberry].DaysAfterSowing as DAS
          [Phenology].CurrentPhaseName as Phase
          [Phenology].CurrentStageName as StageName
          [Phenology].Stage as StageNumber
          [Phenology].AccumulatedTT as AccTT
          [Leaf].LAI as LAI
          [Leaf].Wt as LeafWt
          [Crown].Wt as CrownWt
          [Root].Wt as RootWt
          [Fruit].Wt as FruitWt
          [Crown].Live.StorageWt as CrownStorageWt
          [AboveGround].Wt as AboveGroundWt
          [Total].Wt as TotalWt
      Report HarvestReport: EventNames=[Strawberry].Harvesting
        VariableNames:
          [Clock].Today
          [Strawberry].DaysAfterSowing as DAS
      Report SeasonEndReport: EventNames=[Clock].EndOfSimulation
        VariableNames:
          [Clock].Today
          [Strawberry].DaysAfterSowing as DAS
          [Fruit].Wt as FruitWtDry
          [Fruit].FreshWt as YieldFreshGPerPlant
  Simulation Cycle1_Oct25_SanAndreas
    Clock: Start=2022-10-25; End=2023-01-23
    Summary
    Weather: FileName=Auburn_AL_2022_2023.met
    SoilArbitrator
    Zone Field: Area=1; Slope=0; AspectAngle=0; Altitude=50
      Soil: same as Cycle1_Oct25_Albion.Field.Soil
      SurfaceOrganicMatter: InitialResidueName=strawberry_residue; InitialResidueType=wheat; InitialResidueMass=0; InitialStandingFraction=0; InitialCPR=0; InitialCNR=40
      MicroClimate: a_interception=0; b_interception=1; c_interception=0; d_interception=0; SoilHeatFluxFraction=0.4; MinimumHeightDiffForNewLayer=0; NightInterceptionFraction=0.5; ReferenceHeight=2
      AtmosphericPotentialEvaporation
      Plant Strawberry: same as Replacements.Strawberry
      Manager SowStrawberry
        CultivarName = SanAndreas
        script: same as in Cycle1_Oct25_Albion.Field.SowStrawberry
      Report DailyReport: same as Cycle1_Oct25_Albion.Field.DailyReport
      Report HarvestReport: EventNames=[Strawberry].Harvesting
        VariableNames:
          [Clock].Today
          [Strawberry].DaysAfterSowing as DAS
      Report SeasonEndReport: EventNames=[Clock].EndOfSimulation
        VariableNames:
          [Clock].Today
          [Strawberry].DaysAfterSowing as DAS
          [Fruit].Wt as FruitWtDry
          [Fruit].FreshWt as YieldFreshGPerPlant
  Simulation Cycle2_Dec27_Albion
    Clock: Start=2022-12-27; End=2023-03-27
    Summary
    Weather: FileName=Auburn_AL_2022_2023.met
    SoilArbitrator
    Zone Field: same as Cycle1_Oct25_Albion.Field
  Simulation Cycle2_Dec27_SanAndreas
    Clock: Start=2022-12-27; End=2023-03-27
    Summary
    Weather: FileName=Auburn_AL_2022_2023.met
    SoilArbitrator
    Zone Field: same as Cycle1_Oct25_SanAndreas.Field
  Simulation Cycle3_Feb28_Albion
    Clock: Start=2023-02-28; End=2023-05-29
    Summary
    Weather: FileName=Auburn_AL_2022_2023.met
    SoilArbitrator
    Zone Field: same as Cycle1_Oct25_Albion.Field
  Simulation Cycle3_Feb28_SanAndreas
    Clock: Start=2023-02-28; End=2023-05-29
    Summary
    Weather: FileName=Auburn_AL_2022_2023.met
    SoilArbitrator
    Zone Field: same as Cycle1_Oct25_SanAndreas.Field
  Simulation AusQld_Nambour_2023
    Clock: Start=2023-03-30; End=2023-11-05
    Summary
    Weather: FileName=Nambour_QLD_2023_2024.met
    SoilArbitrator
    Zone Field: Area=1; Slope=0; AspectAngle=0; Altitude=50
      Soil: same as Cycle1_Oct25_Albion.Field.Soil
      SurfaceOrganicMatter: InitialResidueName=strawberry_residue; InitialResidueType=wheat; InitialResidueMass=0; InitialStandingFraction=0; InitialCPR=0; InitialCNR=40
      MicroClimate: a_interception=0; b_interception=1; c_interception=0; d_interception=0; SoilHeatFluxFraction=0.4; MinimumHeightDiffForNewLayer=0; NightInterceptionFraction=0.5; ReferenceHeight=2
      AtmosphericPotentialEvaporation
      Plant Strawberry: same as Replacements.Strawberry
      Manager SowStrawberry
        CultivarName = GenericSD
        Population = 5.1282
        RowSpacing = 300
```csharp
using System;
using Models.Core;
using Models.PMF;
using Models.PMF.Organs;

[Serializable]
public class Script : Model
{
    [Link] private Plant Strawberry = null;
    [Link] private SimpleLeaf Leaf = null;
    [Link] private GenericOrgan Crown = null;
    [Link] private GenericOrgan Root = null;

    [Description("Cultivar to sow")]
    public string CultivarName { get; set; }
    [Description("Population (plants/m2)")]
    public double Population { get; set; }
    [Description("Row spacing (mm)")]
    public double RowSpacing { get; set; }

    [EventSubscribe("StartOfSimulation")]
    private void OnStartOfSimulation(object sender, EventArgs e)
    {
        Strawberry.Sow(cultivar: CultivarName, population: Population, depth: 10.0, rowSpacing: RowSpacing);
        Leaf.Live.StructuralWt = 8.0;
        Crown.Live.StructuralWt = 5.0;
        Root.Live.StructuralWt = 4.0;
    }
}
```
      Report DailyReport: same as Cycle1_Oct25_Albion.Field.DailyReport
      Report HarvestReport: EventNames=[Strawberry].Harvesting
        VariableNames:
          [Clock].Today
          [Strawberry].DaysAfterSowing as DAS
      Report SeasonEndReport: EventNames=[Clock].EndOfSimulation
        VariableNames:
          [Clock].Today
          [Strawberry].DaysAfterSowing as DAS
          [Fruit].Wt as FruitWtDry
          [Fruit].FreshWt as YieldFreshGPerPlant
  Simulation AusQld_Nambour_2024
    Clock: Start=2024-04-22; End=2024-11-28
    Summary
    Weather: FileName=Nambour_QLD_2023_2024.met
    SoilArbitrator
    Zone Field: same as AusQld_Nambour_2023.Field
  Folder Validation
    Folder Combined Results
      Memo Combined Results
        Predicted vs observed comparisons across all validation simulations. DaysToMaturity: 6 McWhirt (Auburn AL, DN, greenhouse) points + 2 Nambour (Qld, SD, field) points, the latter using the midpoint (80 d) of the paper's reported 70-90 day first-fruit window since no exact date was published. Yield: 2 Nambour season-total points only - McWhirt did not report yield.
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